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# IF97 Steam Property Functions
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# This file was created to redefine the IF97 add-in functions with common mathematical notation and units.
# These water properties functions access the IAPWS Steam and Water Properties Formulations for Industrial Use (1997) DLL add-in, obtained at https://github.com/CoolProp/IF97, and re-define these functions to use more conventional nomenclature as well as handling of units.  The IF97 add-in must be built with IAPWS_UNITS defined for this include worksheet to work properly; otherwise, use the if97_Units_SI.mcdx include file.
#
# This document should be included to make use of any of the property functions in the tables below.
# Water Property Notation
#
# Subscript Notation for
# Fluid Properties  Thermodynamic State:
# - ρ  Density
# - h  Enthalpy
# - u  Internal Energy
# - s  Entropy
# - C_p Isobaric Specific Heat
# - C_v Isochoric Specific Heat
# - μ  Dynamic Viscosity
# - ν  Kinematic Viscosity (μ/ρ)
# - k  Thermal Conductivity
# - Pr Prandtl Number (μ*Cp/k)
# - tp  Sub-cooled liquid or
# Super-heated vapor as
# a function of
# temperature (t) and
# pressure (p)
#
# - f  Saturated Liquid as a
# function of pressure (p)
#
# - g  Saturated Vapor as a
# function of pressure (p)
# Water Property Functions
# sub-cooled liquid /  Saturated  Saturated
# Property  super-heated vapor  Liquid  Vapor
#
# Density  ρ_tp(T, P)  ρ_f(P)  ρ_g(P)
#
# Enthalpy  h_tp(T, P)  h_f(P)  h_g(P)
#
# Internal Energy  u_tp(T, P)  u_f(P)  u_g(P)
#
# Entropy  s_tp(T, P)  s_f(P)  s_g(P)
#
# Isobaric Specific Heat  C_ptp(T, P)  C_pf(P)  C_pg(P)
#
# Isochoric Specific Heat  C_vtp(T, P)  C_vf(P)  C_vg(P)
#
# Dynamic Viscosity  μ_tp(T, P)  μ_f(P)  μ_g(P)
#
# Kinematic Viscosity  ν_tp(T, P)  ν_f(P)  ν_g(P)
#
# Thermal Conductivity  k_tp(T, P)  k_f(P)  k_g(P)
#
# Prandtl Number  Pr_tp(T, P)  Pr_f(P)  Pr_g(P)
# Two-Phase Functions
#
# Property  Function  Property  Vapor
#
# Saturation Temperature  T_sat(P)  Steam Quality  X_ph(P, H)
#
# Saturation Pressure  P_sat(T)  X_ps(P, S)
#
# Surface Tension  σ(T)  X_pv(P, V)
#
# Density Difference  Δρ(P)  Reverse
# Temperature  T_ph(P, H)
# Heat of Vaporization  Δh(P)
# T_ps(P, S)
# Note 1: Units are returned from these functions in the appropriate form.  The values returned are not unitless and will display in any unit system required.
#
# Note 2: Temperature MUST be specified in absolute units (either R or K).  Failure to do so will result in improper results from these functions.
# UNIT CHECKS:
# These functions perform a Unit Test, and return a 1 if units are OK, an error if not.  Using these functions in the property definitions below ensures that the proper unit types are passed to each property function for conversion to the Steam Property DLL required units.
# Unit Check Functions in Collapsed Area
# Check temperature and
# pressure units.
#
# Check Pressure Only.
#
# Check Temperature Only.
#
# Check Entropy
#
# Check Pressure and Enthalpy.
#
# Check Pressure and Entropy.
#
# Check Temperature and Density
#
# Check Pressure and Density
#
# Check Pressure and Volume
#
# Check Enthalpy and Entropy
UT(T, P) :=
    if (SIUnitsOf(T/K) == 1) and (SIUnitsOf(P/MPa) == 1)
        1
    else
        0
UTP(P) :=
    if SIUnitsOf(P/MPa) == 1
        1
    else
        0
UTT(T) :=
    if SIUnitsOf(T/K) == 1
        1
    else
        0
UTS(S) :=
    if (SIUnitsOf(S*kg K/kJ) == 1)
        1
    else
        0
UTPH(P, H) :=
    if (SIUnitsOf(P/MPa) == 1) and (SIUnitsOf(H*kg/kJ) == 1)
        1
    else
        0
UTPS(P, S) :=
    if (SIUnitsOf(P/MPa) == 1) and (SIUnitsOf(S*kg*K/kJ) == 1)
        1
    else
        0
UTTρ(T, ρ) :=
    if (SIUnitsOf(T/K) == 1) and (SIUnitsOf(ρ*m^3*kg^-1) == 1)
        1
    else
        0
UTPρ(P, ρ) :=
    if (SIUnitsOf(P/MPa) == 1) and (SIUnitsOf(ρ*m^3*kg^-1) == 1)
        1
    else
        0
UTPV(P, V) :=
    if (SIUnitsOf(P/MPa) == 1) and (SIUnitsOf(V*kg*m^-3) == 1)
        1
    else
        0
UTHS(H, S) :=
    if (SIUnitsOf(H*kg/kJ) == 1) and (SIUnitsOf(S*kg K/kJ) == 1)
        1
    else
        0
# IF97 Add-in Version in Use
if97_getvers(0) = "v2.2.0 (IAPWS Units)"
# Critical Constants at the Triple Point and Critical Point
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# Triple Point
T_t := if97_ttrip(0) K
P_t := if97_ptrip(0)*MPa
T_t = 273.16 K
P_t = 611.657 Pa
# Critical Point
T_c := if97_tcrit(0)*K
P_c := if97_pcrit(0)*MPa
T_c = 647.096 K
P_c = 22.064 MPa
ρ_c := 322*kg*m^-3
# Maxima
# (Region 1, 2, &3)
T_max := 1073.15*K
P_max := 100*MPa
P_min := 611.213 Pa
# Region 1-3 Boundary
T_13 := 623.15*K
# Region 5 Boundary
T_high := 2273.15 K
P_high := 50 MPa
# Saturation and Boundary Curve Functions
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# Saturation Temperature at P, and Saturation Pressure at T:
T_sat(P) := UTP(P)*(if97_tsatp(P*MPa^-1)*K)
P_sat(T) := UTT(T)*(if97_psatt(T*K^-1)*MPa)
# Temperature/Pressure curve along Boundary between Regions 2 (Liquid) and 3 (Supercritical):
T_B(P) := UTP(P)*(if97_t23(P*MPa^-1)*K)
P_B(T) := UTT(T)*(if97_p23(T*K^-1)*MPa)
# Enthalpy/Entropy curves along minimum and maximum boundaries (for verification purposes)
h_max(s) := (UTS(s)*if97_hmaxs(s/((kJ kg^-1) K^-1))) kJ/kg
h_min(s) := (UTS(s)*if97_hmins(s/((kJ kg^-1) K^-1))) kJ/kg
# Enthalpy/Entropy curves along Saturation, Region 1-3, and Region 2ab boundaries (for verification purposes)
h_sat(s) := (UTS(s)*if97_hsats(s/((kJ kg^-1) K^-1))) kJ/kg
h_13(s) := (UTS(s)*if97_h13s(s/((kJ kg^-1) K^-1))) kJ/kg
h_2ab(s) := (UTS(s)*if97_h2ab(s/((kJ kg^-1) K^-1))) kJ/kg
# Subcooled Liquid / Superheated Vapor | Saturated Liquid:
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C_ptp(T, P) := UT(T, P)*if97_cptp(T/K, P/MPa)*kJ/(kg*K)
C_pf(P) := UTP(P)*if97_cpf(P/MPa)*kJ/(kg*K)
C_vtp(T, P) := UT(T, P)*if97_cvtp(T/K, P/MPa)*kJ/(kg*K)
C_vf(P) := UTP(P)*if97_cvf(P/MPa)*kJ/(kg*K)
ρ_tp(T, P) := UT(T, P)*if97_vtp(T/K, P/MPa)^-1*kg/m^3
ρ_f(P) := UTP(P)*if97_vf(P/MPa)^-1*kg/m^3
v_tp(T, P) := UT(T, P)*if97_vtp(T/K, P/MPa)*m^3/kg
v_f(P) := UTP(P)*if97_vf(P/MPa)*m^3/kg
h_tp(T, P) := UT(T, P)*if97_htp(T/K, P/MPa)*kJ/kg
h_f(P) := UTP(P)*if97_hf(P/MPa)*kJ/kg
u_tp(T, P) := UT(T, P)*if97_utp(T/K, P/MPa)*kJ/kg
u_f(P) := UTP(P)*if97_uf(P/MPa)*kJ/kg
s_tp(T, P) := UT(T, P)*if97_stp(T/K, P/MPa)*kJ/(kg*K)
s_f(P) := UTP(P)*if97_sf(P/MPa)*kJ/(kg*K)
w_tp(T, P) := UT(T, P)*if97_wtp(T/K, P/MPa)*m/s
w_f(P) := UTP(P)*if97_wf(P/MPa)*m/s
# Viscosity
μ_tp(T, P) := UT(T, P)*if97_mutp(T/K, P/MPa)*Pa*s
μ_f(P) := UTP(P)*if97_muf(P/MPa)*Pa*s
# Dynamic Viscosity
ν_tp(T, P) := μ_tp(T, P)/ρ_tp(T, P)
ν_f(P) := μ_f(P)/ρ_f(P)
# Thermal Conductivity
k_tp(T, P) := UT(T, P)*if97_ktp(T/K, P/MPa)*W/(m*K)
k_f(P) := UTP(P)*if97_kf(P/MPa)*W/(m*K)
# Prandtl Number
Pr_tp(T, P) := UT(T, P)*if97_prtp(T/K, P/MPa)
Pr_f(P) := UTP(P)*if97_prf(P/MPa)
# Saturated Vapor:
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C_pg(P) := UTP(P)*if97_cpg(P/MPa)*kJ/(kg*K)
C_vg(P) := UTP(P)*if97_cvg(P/MPa)*kJ/(kg*K)
ρ_g(P) := UTP(P)*if97_vg(P/MPa)^-1*kg/m^3
v_g(P) := UTP(P)*if97_vg(P/MPa)*m^3/kg
h_g(P) := UTP(P)*if97_hg(P/MPa)*kJ/kg
u_g(P) := UTP(P)*if97_ug(P/MPa)*kJ/kg
s_g(P) := UTP(P)*if97_sg(P/MPa)*kJ/(kg*K)
w_g(P) := UTP(P)*if97_wg(P/MPa)*m/s
# Viscosity
μ_g(P) := UTP(P)*if97_mug(P/MPa)*Pa*s
# Dynamic Viscosity
ν_g(P) := μ_g(P)/ρ_g(P)
# Thermal Conductivity
k_g(P) := UTP(P)*if97_kg(P/MPa)*W/(m*K)
# Prandtl Number
Pr_g(P) := UTP(P)*if97_prg(P/MPa)
# Additional functions:
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# Coefficient of Thermal Expansion
β(T, P) := UT(T, P)*(-1/ρ_tp(T, P))*(d/dT(ρ_tp(T, P)))
# Liquid Density as a function of Pressure and Enthalpy
ρ_ph(P, h) := UTPH(P, h)*if97_rhoph(P/MPa, h/(kJ*kg^-1))*kg/m^3
# Liquid Density as a function of Pressure and Entropy
ρ_ps(P, s) := UTPS(P, s)*if97_rhops(P/MPa, s/(kJ*kg^-1 K^-1))*kg/m^3
# Temperature
# as a function of Pressure
# and Enthalpy
T_ph(P, h) := UTPH(P, h)*if97_tph(P/MPa, h/(kJ*kg^-1))*K
# Temperature
# as a function of Pressure
# and Entropy
T_ps(P, S) := UTPS(P, S)*if97_tps(P/MPa, S*(kJ/(kg*K))^-1)*K
# Enthalpy as a function of Pressure and Entropy
h_ps(P, S) := UTPS(P, S)*if97_hps(P/MPa, S*(kJ/(kg*K))^-1) kJ/kg
# Entropy as a function of Pressure and Enthalpy
s_ph(P, h) := UTPH(P, h)*if97_sph(P/MPa, h/(kJ*kg^-1)) kJ/(kg K)
# Temperature
# as a function of Enthalpy
# and Entropy
T_hs(h, s) := UTHS(h, s)*if97_ths(h/(kJ*kg^-1), s/(kJ*kg^-1 K))*K
# Pressure
# as a function of Enthalpy
# and Entropy
P_hs(h, s) := UTHS(h, s)*if97_phs(h/(kJ*kg^-1), s/(kJ*kg^-1 K))*MPa
# Isentropic Exponent
γ(t, p) := C_ptp(t, p)/C_vtp(t, p)
# Viscosity as a function of
# Temperature and Density
# (as coded in C++)
μ_tρ(T, ρ) := ((UTTρ(T, ρ)*if97_mutrho(T/K, ρ/(kg/m^3))) Pa) s
# Region determination based
# on Pressure and Enthalpy
R_ph(p, h) := UTPH(p, h)*if97_regionph(p/MPa, h*(kJ/kg)^-1)
# Region determination based
# on Pressure and Entropy
R_ps(p, s) := UTPS(p, s)*if97_regionps(p/MPa, s*(kJ/(kg K))^-1)
# Functions for co-existing phases at saturation pressure:
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# Phase Density Difference
Δρ(P) := ρ_f(P) - ρ_g(P)
# Heat of Vaporization
h_fg(P) := h_g(P) - h_f(P)
Δh(P) := h_g(P) - h_f(P)
# Surface Tension Coefficient
σ(T) := UTT(T)*if97_sigma(T/K)*kg/s^2
# Morton Number
Mo(PP) := UTP(PP)*g*μ_f(PP)^4*Δρ(PP)*(ρ_f(PP)^2*σ(T_sat(PP))^3)^-1
# Enthalpy as a function
# of pressure and quality, x
h_px(P, x) := UTP(P)*if97_hpx(P/MPa, x) kJ/kg
# Energy as a function
# of pressure and quality, x
u_px(P, x) := UTP(P)*if97_upx(P/Pa, x) kJ/kg
# Entropy as a function
# of pressure and quality, x
s_px(P, x) := UTP(P)*if97_spx(P/MPa, x) kJ/(kg*K)
# Density as a function
# of pressure and quality, x
ρ_px(P, x) := UTP(P)*if97_vpx(P/MPa, x)^-1 kg/m^3
# Volume as a function
# of pressure and quality, x
v_px(P, x) := UTP(P)*if97_vpx(P/Pa, x) m^3/kg
# Quality functions:
# from pressure-enthalpy
X_ph(P, H) := UTPH(P, H)*if97_xph(P/MPa, H*(kJ/kg)^-1)
# from pressure-energy
X_pu(P, U) := UTPH(P, U)*if97_xpu(P/Pa, U*(kJ/kg)^-1)
# from pressure-entropy
X_ps(P, S) := UTPS(P, S)*if97_xps(P/MPa, S*(kJ/(kg*K))^-1)
# from pressure-density
X_pv(P, ρ) := UTPρ(P, ρ)*if97_xpv(P/MPa, ρ*(kg/m^3)^-1)
# from pressure-volume
X_pv(P, V) := UTPV(P, V)*if97_xpv(P/MPa, V*(m^3/kg)^-1)
# Test the functions:
TT := 500 °F
PP := 2000*psi
# Saturation P+T:
P_sat(TT) = 680.527 psi
T_sat(PP) = 635.853 °F
T_ph(PP, h_tp(TT, PP)) = 499.975 °F  # check!
# Subcooled Liquid (T,P) | Sat. Liquid (P): | Sat. Vapor (P):
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# Density:
ρ_tp(TT, PP) = 49.6178 lb/ft^3
ρ_f(PP) = 39.0097 lb/ft^3
ρ_g(PP) = 5.3138 lb/ft^3
# Enthalpy:
h_tp(TT, PP) = 487.477 BTU/lb
h_f(PP) = 671.797 BTU/lb
h_g(PP) = 1136.5 BTU/lb
# Entropy:
s_tp(TT, PP) = 0.683411 BTU/(lb*R)
s_f(PP) = 0.862226 BTU/(lb*R)
s_g(PP) = 1.28641 BTU/(lb*R)
# Heat Capacity
C_ptp(TT, PP) = 1.15713 BTU/(lb*R)
C_pf(PP) = 1.83527 BTU/(lb*R)
C_pg(PP) = 2.61495 BTU/(lb*R)
# Prandtl Number:
Pr_tp(TT, PP) = 0.821161
Pr_f(PP) = 1.12998
Pr_g(PP) = 2.27373
# Thermal Conductivity
k_tp(TT, PP) = 0.356089 BTU/(hr*ft*R)
k_f(PP) = 0.283766 BTU/(hr*ft*R)
k_g(PP) = 0.0612599 BTU/(hr*ft*R)
# Dynamic Viscosity:
μ_tp(TT, PP) = 0.2527 lb/(hr*ft)
μ_f(PP) = 0.174716 lb/(hr*ft)
μ_g(PP) = 0.0532661 lb/(hr*ft)
μ_tp(20 °C, 1 atm) = 1.0016 cP
# Kinematic Viscosity:
ν_tp(TT, PP) = 1.3143 mSt
ν_f(PP) = 1.15581 mSt
ν_g(PP) = 2.58686 mSt
ν_tp(20 °C, 1 atm) = 1.0034 cSt
# Functions for co-existing phases at saturation pressure:
# Surface Tension:
σ(T_sat(PP)) = 0.0144476 lb/s^2
# Enthalpy of Vaporization:
h_fg(PP) = 464.705 BTU/lb
Δρ(PP) = 33.6959 lb/ft^3
# Density difference:
# Morton Number:
Mo(PP) = 1.31061e-12
# Additional Units:
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kJ ≡ 1000*J
mN ≡ 10^-3*N
μPa ≡ 10^-6*Pa
St ≡ stokes
cP ≡ 10^-2 poise
mN/m ≡ mN/m
mPa ≡ 10^-3 Pa
mSt ≡ 10^-3 St
kmol ≡ 1000*mol
cSt ≡ 10^-2 St
# Additional Constants for IF97 Water:
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# [IAPWS Guideline on the Use of Fundamental Physical Constants and Basic Constants of Water, 2001]
# Molecular Weight:
MW_H2O := 18.016268*gm/mol
# Ideal Gas Constant:
R_g := 0.461526*kJ/(kg K)  # Mass Basis (defined in IAPWS-IF97)
R_gm := R_g*MW_H2O = 8.31498 kJ/(kmol K)  # Mole Basis (defined in IAPWS-IF97)
R = 8.31446 kJ/(kmol K)  # Mole Basis (Mathcad built-in value is slightly lower than the IAPWS-IF97 reference value. Use R_gm instead.)
# Utility Functions:
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# Utility function for checking the number of significant digits in a relative error value.
sigdig(x, p) :=
    f ← 10^floor(log(x))
    round(x/f, p - 1)*f
