# Worksheet setting: ORIGIN = 1
## CoolProp IF97 Mathcad Add-in DLL Function Verification
# This IF97 Mathcad Add-in DLL is based on the CoolProp implementation of the Revised Release on the IAPWS Industrial Formulation 1997 for the Thermodynamic Properties of Water and Steam (2007) and supplementary releases for additional transport and physical properties for pure water substance.  This implementation of the IF97 equations is:
#
# - Entirely free and open-source
# - Written in optimized standard C++ code so it will compile anywhere
# - Fast
# - Easy-to-use (just a single header)
#
# This Mathcad worksheet provides verification of of the CoolProp IF97 implementation and Mathcad Add-in DLL by comparing calculated values to tabulated values for computer program verification contained in the various IAPWS release documents.
#
# IF97 Mathcad Functions
#
# After copying the if97_EN.xml file to the directory
#
# C:\Program Files (x86)\Mathcad\Mathcad 15\doc\funcdoc
#
# the IF97 functions can be accessed through the Mathcad menus under Insert | Function..., or from the f(x) button on the toolbar.  On the function panel, the IF97 functions will be under the if97 category and will all begin with the if97_ prefix.
## IF97 Thermodynamic Properties Verification for v, h, u, s, Cp, w
# These tables below contain the Reference [a] published values for verification of computer programs.  Each entry shows the page number and table where the values can be found in the Reference [a] document.
# T (K)  P(MPa)
TP := [
    300, 3, "Region 1", "Page 9, Table 5";
    300, 80, "Region 1", "Page 9, Table 5";
    500, 3, "Region 1", "Page 9, Table 5";
    300, 0.0035, "Region 2", "Page 17, Table 15";
    700, 0.0035, "Region 2", "Page 17, Table 15";
    700, 30, "Region 2", "Page 17, Table 15";
    650, 25.58370180, "Region 3", "Page 32, Table 33";
    650, 22.29306430, "Region 3", "Page 32, Table 33";
    750, 78.30956390, "Region 3", "Page 32, Table 33";
    1500, 0.5, "Region 5", "Page 40, Table 42";
    1500, 30, "Region 5", "Page 40, Table 42";
    2000, 30, "Region 5", "Page 40, Table 42"
]
T1 := TP[:, 1]*K
kJ ≡ 1000*J
P1 := TP[:, 2]*MPa
i := 1 .. rows(P1)
j := 1 .. 6
# v  h  u  s  Cp  w
# (m³/kg)  (kJ/kg)  (kJ/kg)  (kJ/kg-K)  (kJ/kg-K)  (m/s)
IF97 := [
    0.001002151680, 115.331273, 112.324818, 0.392294792, 4.17301218, 1507.739210;
    0.000971180894, 184.142828, 106.448356, 0.368563852, 4.01008987, 1634.690540;
    0.001202418000, 975.542239, 971.934985, 2.580419120, 4.65580682, 1240.713370;
    39.4913866, 2549.911450, 2411.691600, 8.522389670, 1.91300162, 427.920172;
    92.3015898, 3335.683750, 3012.628190, 10.174999600, 2.08141274, 644.289068;
    0.005429466190, 2631.494740, 2468.610760, 5.175402980, 10.35050920, 480.386523;
    0.002, 1863.430190, 1812.262790, 4.054272730, 13.89357170, 502.005554;
    0.005, 2375.124010, 2263.658680, 4.854387920, 44.65793420, 383.444594;
    0.002, 2258.688450, 2102.069320, 4.469719060, 6.34165359, 760.696041;
    1.3845509, 5219.768550, 4527.493100, 9.654088750, 2.61609445, 917.068690;
    0.0230761299, 5167.235140, 4474.951240, 7.729701330, 2.72724317, 928.548002;
    0.0311385219, 6571.226040, 5637.070380, 8.536405230, 2.88569882, 1067.369480
]
[
    "Region 1", "Page 9, Table 5";
    "Region 1", "Page 9, Table 5";
    "Region 1", "Page 9, Table 5";
    "Region 2", "Page 17, Table 15";
    "Region 2", "Page 17, Table 15";
    "Region 2", "Page 17, Table 15";
    "Region 3", "Page 32, Table 33";
    "Region 3", "Page 32, Table 33";
    "Region 3", "Page 32, Table 33";
    "Region 5", "Page 40, Table 42";
    "Region 5", "Page 40, Table 42";
    "Region 5", "Page 40, Table 42"
]
## Verification using Newton-Raphson reverse lookup in Region 3
M[i, 1] := if97_vtp(T1[i]/K, P1[i]/Pa)
M[i, 2] := if97_htp(T1[i]/K, P1[i]/Pa)*J/kJ
M[i, 3] := if97_utp(T1[i]/K, P1[i]/Pa)*J/kJ
M[i, 4] := if97_stp(T1[i]/K, P1[i]/Pa)*J/kJ
M[i, 5] := if97_cptp(T1[i]/K, P1[i]/Pa)*J/kJ
M[i, 6] := if97_wtp(T1[i]/K, P1[i]/Pa)
# Calculate the relative error in the calculated values from the published values:
ERR[i, j] := |IF97[i, j] - M[i, j]|/IF97[i, j]
# Relative Error Between Calculated and Published Values
# (Newton Raphson Reverse Lookup in Region 3)
# ε_v | ε_h | ε_u | ε_s | ε_Cp | ε_w
ERR = [
    3.12633e-10, 1.8589e-10, 1.56876e-10, 1.02634e-9, 9.74783e-10, 2.19514e-10;
    2.22716e-11, 1.44315e-9, 1.9965e-9, 1.08118e-9, 8.81957e-11, 1.90352e-9;
    2.80962e-9, 9.96629e-11, 8.96051e-11, 2.00783e-11, 4.53457e-10, 2.49995e-9;
    9.56234e-10, 3.29431e-10, 9.91897e-10, 3.12613e-10, 5.14083e-10, 6.14846e-10;
    1.88726e-10, 1.11858e-9, 2.09035e-10, 2.10359e-9, 1.77878e-9, 6.72768e-10;
    8.50494e-10, 1.84109e-9, 4.02544e-10, 4.4423e-10, 7.95278e-10, 3.5333e-10;
    5.98357e-10, 9.57818e-11, 1.9062e-9, 9.67754e-10, 6.34956e-9, 1.74896e-9;
    1.63055e-8, 5.89393e-9, 1.62626e-9, 3.11585e-9, 6.89819e-8, 6.01693e-9;
    1.37062e-10, 1.97513e-9, 1.08584e-9, 8.12862e-10, 9.15062e-10, 3.23598e-10;
    8.80047e-10, 2.31493e-10, 4.01453e-10, 3.43165e-10, 1.50746e-9, 3.29185e-10;
    2.04773e-9, 1.7324e-11, 3.73615e-10, 4.9384e-10, 8.32536e-10, 2.26987e-10;
    9.67095e-10, 2.10238e-10, 4.47377e-10, 1.33318e-10, 4.2249e-10, 1.14541e-9
]
# The largest errors are in v and Cp at 22.3 MPa and 650 K and are accurate to about 8 significant figures.  These are in Region 3 where the reverts lookup occurs for density.  The remaining values are accurate to 8 significant figures or more.  The verification values for Cv are not listed in the IAPWS documents.
## Verification using supplemental reverse lookup equations in Region 3
# Relative Error Between Calculated and Published Values
# (Supplemental Reverse Lookup Functions in Region 3)
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# The largest errors are in Region 3 where the reverse lookup occurs for density.  These errors are on the order of 1E-6 using just the supplemental reverse lookup equations for density, while the error in the other regions is on the order of 1.0E-9 or lower.
# Timing Test
# Supplemental Reverse Lookup Functions
# Timing Test
# Newton-Raphson Iterative Reverse Lookup
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Speed_factor := 0.072/0.028 = 2.57143
# Using the supplemental reverse lookup equations for density to get an accurate initial guess for pressure and then using Newton-Raphson to iterate on the original Region 3 equation increases the time to calculate density (specific volume) values in this region by a factor of about 2.6, but is far better than the factor of 17 indicated in the supplemental release document using an arbitrary initial guess.
## Saturation Curve Verification
## IAPWS Values
## Calculated Values
# Set up Pressure and Temperature matrix based on tabulated values from IAPWS-IF97 on page 35,
# Table 36.
P_IAPWS := [0.1; 1; 10]*MPa
T2 := vectorize(if97_tsatp(P_IAPWS/Pa))*K = [372.756; 453.036; 584.149] K
T_IAPWS := [372.755919; 453.035632; 584.149488]*K
P2 := vectorize(if97_psatt(T_IAPWS/K))*Pa = [0.1; 1; 10] MPa
ERR := vectorize((T_IAPWS - T2)/T_IAPWS) = [1.04267e-9; -8.64097e-10; 2.52071e-12]
ERR2 := vectorize((P_IAPWS - P2)/P_IAPWS) = [-1.39034e-8; 9.00847e-9; -2.00316e-11]
# The calculated values agree to the published values to about 8 significant figures or more.
# Triple Point:
T_t := if97_ttrip(0)*K = 273.16 K
P_t := if97_ptrip(0)*Pa = 611.657 Pa
# Critical Point:
T_c := if97_tcrit(0)*K = 647.096 K
P_c := if97_pcrit(0)*Pa = 22.064 MPa
# Set up Curve Ranges:
ΔP := (P_c - P_t)/1000 = 0.0220634 MPa
ΔT := (T_c - T_t)/600 = 0.623227 K
P_s := P_t, P_t + ΔP .. P_c
T_s := T_t, T_t + ΔT .. T_c
# Saturation Functions :
T_sat(P) := round(if97_tsatp(P/Pa), 7)*K
P_sat(T) := round(if97_psatt(T/K), 3)*Pa
# check :
T_sat(P_t) = 273.16 K
P_sat(T_t) = 611.657 Pa
T_sat(P_c) = 647.096 K
P_sat(T_c) = 22.064 MPa
# Region 2/3 Functions :
T_23(P) := if97_t23(P/Pa)*K
P_23(T) := if97_p23(T/K)*Pa
T_Bmin := 623.15*K
T_Bmax := 863.15*K
ΔT_B := (T_Bmax - T_Bmin)/300 = 0.8 K
T_B := T_Bmin, T_Bmin + ΔT_B .. T_Bmax
# Region 1/3 Curve :
T_13[1] := T_Bmin
T_13[2] := T_Bmin
P_13[1] := P_23(T_Bmin) = 16.5292 MPa
P_13[2] := 100*MPa
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# References
#
# [a]  IAPWS, Revised Release on the IAPWS Industrial Formulation 1997 for the Thermodynamic Properties of Water and Steam, Lucerne, Switzerland, August 2007.
# [b]  IAPWS, Revised Supplementary Release on Backward Equations for Specific Volume as a Function of Pressure and Temperature v(p,T) for Region 3 of the IAPWS Industrial Formulation 1997 for the Thermodynamic Properties of Water and Steam, Moscow, Russia, 2014.
