# Worksheet setting: ORIGIN = 1
## CoolProp IF97 Mathcad Add-in DLL Function Verification
# This IF97 Mathcad Add-in DLL is based on the CoolProp implementation of the Revised Release on the IAPWS Industrial Formulation 1997 for the Thermodynamic Properties of Water and Steam (2007) and supplementary releases for additional transport and physical properties for pure water substance.  This implementation of the IF97 equations is:
#
# - Entirely free and open-source
# - Written in optimized standard C++ code so it will compile anywhere
# - Fast
# - Easy-to-use (just a single header)
#
# This Mathcad worksheet provides verification of of the CoolProp IF97 implementation and Mathcad Add-in DLL by comparing calculated values to tabulated values for computer program verification contained in the various IAPWS release documents.
#
# IF97 Mathcad Functions
#
# After copying the if97_EN.xml file to the directory
#
# C:\Program Files (x86)\Mathcad\Mathcad 15\doc\funcdoc
#
# the IF97 functions can be accessed through the Mathcad menus under Insert | Function..., or from the f(x) button on the toolbar.  On the function panel, the IF97 functions will be under the if97 category and will all begin with the if97_ prefix.
# CoolProp IF97 Implementation Version
#
# This Mathcad function returns the version number of the CoolProp IF97 implementation:
if97_getvers(0) = "v2.0.0"
## IF97 Thermodynamic Properties Verification for v, h, u, s, Cp, w
# These tables below contain the Reference [a] published values for verification of computer programs.  Each entry shows the page number and table where the values can be found in the Reference [a] document.
# T
# (K)
# P
# (MPa)
TP := [
    300, 3, "Region 1", "Page 9, Table 5";
    300, 80, "Region 1", "Page 9, Table 5";
    500, 3, "Region 1", "Page 9, Table 5";
    300, 0.0035, "Region 2", "Page 17, Table 15";
    700, 0.0035, "Region 2", "Page 17, Table 15";
    700, 30, "Region 2", "Page 17, Table 15";
    650, 25.58370180, "Region 3", "Page 32, Table 33";
    650, 22.29306430, "Region 3", "Page 32, Table 33";
    750, 78.30956390, "Region 3", "Page 32, Table 33";
    1500, 0.5, "Region 5", "Page 40, Table 42";
    1500, 30, "Region 5", "Page 40, Table 42";
    2000, 30, "Region 5", "Page 40, Table 42"
]
T1 := TP[:, 1]*K
kJ ≡ 1000*J
P1 := TP[:, 2]*MPa
i := 1 .. rows(P1)
j := 1 .. 6
# v
# (m³/kg)
# h
# (kJ/kg)
# u
# (kJ/kg)
# s
# (kJ/kg-K)
# Cp
# (kJ/kg-K)
# w
# (m/s)
IF97 := [
    0.001002151680, 115.331273, 112.324818, 0.392294792, 4.17301218, 1507.739210;
    0.000971180894, 184.142828, 106.448356, 0.368563852, 4.01008987, 1634.690540;
    0.001202418000, 975.542239, 971.934985, 2.580419120, 4.65580682, 1240.713370;
    39.4913866, 2549.911450, 2411.691600, 8.522389670, 1.91300162, 427.920172;
    92.3015898, 3335.683750, 3012.628190, 10.174999600, 2.08141274, 644.289068;
    0.005429466190, 2631.494740, 2468.610760, 5.175402980, 10.35050920, 480.386523;
    0.002, 1863.430190, 1812.262790, 4.054272730, 13.89357170, 502.005554;
    0.005, 2375.124010, 2263.658680, 4.854387920, 44.65793420, 383.444594;
    0.002, 2258.688450, 2102.069320, 4.469719060, 6.34165359, 760.696041;
    1.3845509, 5219.768550, 4527.493100, 9.654088750, 2.61609445, 917.068690;
    0.0230761299, 5167.235140, 4474.951240, 7.729701330, 2.72724317, 928.548002;
    0.0311385219, 6571.226040, 5637.070380, 8.536405230, 2.88569882, 1067.369480
]
## Verification using Newton-Raphson reverse lookup in Region 3
M[i, 1] := if97_vtp(T1[i]/K, P1[i]/Pa)
M[i, 2] := if97_htp(T1[i]/K, P1[i]/Pa)*J/kJ
M[i, 3] := if97_utp(T1[i]/K, P1[i]/Pa)*J/kJ
M[i, 4] := if97_stp(T1[i]/K, P1[i]/Pa)*J/kJ
M[i, 5] := if97_cptp(T1[i]/K, P1[i]/Pa)*J/kJ
M[i, 6] := if97_wtp(T1[i]/K, P1[i]/Pa)
# Calculate the relative error in the calculated values from the published values:
ERR[i, j] := |IF97[i, j] - M[i, j]|/IF97[i, j]
# Relative Error Between Calculated and Published Values
# (Newton Raphson Reverse Lookup in Region 3)
# ε_v | ε_h | ε_u | ε_s | ε_Cp | ε_w
ERR = [
    3.12633e-10, 1.8589e-10, 1.56876e-10, 1.02634e-9, 9.74783e-10, 2.19514e-10;
    2.22716e-11, 1.44315e-9, 1.9965e-9, 1.08118e-9, 8.81957e-11, 1.90352e-9;
    2.80962e-9, 9.96629e-11, 8.96051e-11, 2.00783e-11, 4.53457e-10, 2.49995e-9;
    9.56234e-10, 3.29431e-10, 9.91897e-10, 3.12613e-10, 5.14083e-10, 6.14846e-10;
    1.88726e-10, 1.11858e-9, 2.09035e-10, 2.10359e-9, 1.77878e-9, 6.72768e-10;
    8.50494e-10, 1.84109e-9, 4.02544e-10, 4.4423e-10, 7.95278e-10, 3.5333e-10;
    5.98357e-10, 9.57818e-11, 1.9062e-9, 9.67754e-10, 6.34956e-9, 1.74896e-9;
    1.63055e-8, 5.89393e-9, 1.62626e-9, 3.11585e-9, 6.89819e-8, 6.01693e-9;
    1.37062e-10, 1.97513e-9, 1.08584e-9, 8.12862e-10, 9.15062e-10, 3.23598e-10;
    8.80047e-10, 2.31493e-10, 4.01453e-10, 3.43165e-10, 1.50746e-9, 3.29185e-10;
    2.04773e-9, 1.7324e-11, 3.73615e-10, 4.9384e-10, 8.32536e-10, 2.26987e-10;
    9.67095e-10, 2.10238e-10, 4.47377e-10, 1.33318e-10, 4.2249e-10, 1.14541e-9
]
# The largest errors are in v and Cp at 22.3 MPa and 650 K and are accurate to about 8 significant figures.  These are in Region 3 where the reverts lookup occurs for density.  The remaining values are accurate to 8 significant figures or more.  The verification values for Cv are not listed in the IAPWS documents.
## Verification using supplemental reverse lookup equations in Region 3
# Relative Error Between Calculated and Published Values
# (Supplemental Reverse Lookup Functions in Region 3)
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# The largest errors are in Region 3 where the reverse lookup occurs for density.  These errors are on the order of 1E-6 using just the supplemental reverse lookup equations for density, while the error in the other regions is on the order of 1.0E-9 or lower.
# Timing Test
# Supplemental Reverse Lookup Functions
# Timing Test
# Newton-Raphson Iterative Reverse Lookup
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Speed_factor := 0.072/0.028 = 2.57143
# Using the supplemental reverse lookup equations for density to get an accurate initial guess for pressure and then using Newton-Raphson to iterate on the original Region 3 equation increases the time to calculate density (specific volume) values in this region by a factor of about 2.6, but is far better than the factor of 17 indicated in the supplemental release document using an arbitrary initial guess.
## Region 3 Supplemental Reverse Functions Verification
# The tables below contain the Reference [b] published values for verification of computer programs.  These values can be found in Table 5 (page 13) and Table 13 (page 20) of Reference [b].
R3 := [
    21.5, 644.6, 2.268366647;
    22, 646.1, 2.296350553;
    22.5, 648.6, 2.832373260;
    22.3, 647.9, 2.811424405;
    22.15, 647.5, 3.694032281;
    22.3, 648.1, 3.622226305;
    22.11, 648, 4.528072649;
    22.3, 649, 4.556905799;
    22, 646.84, 2.698354719;
    22.064, 647.05, 2.717655648;
    22, 646.89, 3.798732962;
    22.064, 647.15, 3.701940010
]
R1 := [
    50, 630, 1.470853100;
    80, 670, 1.503831359;
    50, 710, 2.204728587;
    80, 750, 1.973692940;
    20, 630, 1.761696406;
    30, 650, 1.819560617;
    26, 656, 2.245587720;
    30, 670, 2.506897702;
    26, 661, 2.970225962;
    30, 675, 3.004627086;
    26, 671, 5.019029401;
    30, 690, 4.656470142;
    23.6, 649, 2.163198378;
    24, 650, 2.166044161;
    23.6, 652, 2.651081407;
    24, 654, 2.967802335;
    23.6, 653, 3.273916816;
    24, 655, 3.550329864;
    23.5, 655, 4.545001142;
    24, 660, 5.100267704
]
R2 := [
    23, 660, 6.109525997;
    24, 670, 6.427325645;
    22.6, 646, 2.117860851;
    23, 646, 2.062374674;
    22.6, 648.6, 2.533063780;
    22.8, 649.3, 2.572971781;
    22.6, 649, 2.923432711;
    22.8, 649.7, 2.913311494;
    22.6, 649.1, 3.131208996;
    22.8, 649.9, 3.221160278;
    22.6, 649.4, 3.715596186;
    22.8, 650.2, 3.664754790;
    21.1, 640, 1.970999272;
    21.8, 643, 2.043919161;
    21.1, 644, 5.251009921;
    21.8, 648, 5.256844741;
    19.1, 635, 1.932829079;
    20, 638, 1.985387227;
    17, 626, 8.483262001;
    20, 640, 6.227528101
]
# Combine columns and split out p, T, and v.
Rev := stack(R1, R2, R3)
P_rev := Rev[:, 1]*MPa
T_rev := Rev[:, 2]*K
v_rev := Rev[:, 3]*10^-3
j := 1 .. length(v_rev)
# Calculate the specific volumes using the
# IF97 supplemental reverse functions:
v'_rev[j] := if97_vtp(T_rev[j]/K, P_rev[j]/Pa)
# Relative Error
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ε_rev := vectorize((v_rev - v'_rev)/v_rev)  # RMS error is well below the 10 significant digits listed in the tables.
RMS_3 := sqrt(sum(vectorize(v_rev - v'_rev))^2/length(v_rev)) = 6.65011e-6
Rev[:, 4] := v'_rev*10^3
Rev[:, 5] := ε_rev  # <== Tack calculated values and rel. error onto table.
# p
# [MPa]
# T
# [K]
# v
# [m³/kg]
# v calc
# [m³/kg]
# rel error
# [unitless]
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Rev = [
    50, 630, 1.47085, 1.47085, -3.9528e-7;
    80, 670, 1.50383, 1.50383, 1.67671e-6;
    50, 710, 2.20473, 2.20474, -4.52351e-6;
    80, 750, 1.97369, 1.97369, -3.51067e-7;
    20, 630, 1.7617, 1.76169, 2.75172e-6;
    30, 650, 1.81956, 1.81957, -4.80361e-6;
    26, 656, 2.24559, 2.24558, 3.3797e-6;
    30, 670, 2.5069, 2.5069, 8.35748e-7;
    26, 661, 2.97023, 2.97023, -2.80683e-6;
    30, 675, 3.00463, 3.00464, -5.5556e-6
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]
# * These values and the RMS error above were calculated with the REGION3_ITERATE switch turned off.
## Saturation Curve Verification
## IAPWS Values
## Calculated Values
# Set up Pressure and Temperature matrix based on tabulated values from IAPWS-IF97 on page 35,
# Table 36.
P_IAPWS := [0.1; 1; 10]*MPa
T2 := vectorize(if97_tsatp(P_IAPWS/Pa))*K = [372.756; 453.036; 584.149] K
T_IAPWS := [372.755919; 453.035632; 584.149488]*K
P2 := vectorize(if97_psatt(T_IAPWS/K))*Pa = [0.1; 1; 10] MPa
ERR := vectorize((T_IAPWS - T2)/T_IAPWS) = [1.04267e-9; -8.64097e-10; 2.52071e-12]
ERR2 := vectorize((P_IAPWS - P2)/P_IAPWS) = [-1.39034e-8; 9.00847e-9; -2.00316e-11]
# The calculated values agree to the published values to about 8 significant figures or more.
# Triple Point:
T_t := if97_ttrip(0)*K = 273.16 K
P_t := if97_ptrip(0)*Pa = 611.656 Pa
# Critical Point:
T_c := if97_tcrit(0)*K = 647.096 K
P_c := if97_pcrit(0)*Pa = 22.064 MPa
# Set up Curve Ranges:
ΔP := (P_c - P_t)/1000 = 0.0220634 MPa
ΔT := (T_c - T_t)/600 = 0.623227 K
P_s := P_t, P_t + ΔP .. P_c
T_s := T_t, T_t + ΔT .. T_c
# Saturation Functions :
T_sat(P) := round(if97_tsatp(P/Pa), 7)*K
P_sat(T) := round(if97_psatt(T/K), 3)*Pa
# check :
T_sat(P_t) = 273.16 K
P_sat(T_t) = 611.657 Pa
T_sat(P_c) = 647.096 K
P_sat(T_c) = 22.064 MPa
# Region 2/3 Functions :
T_23(P) := if97_t23(P/Pa)*K
P_23(T) := if97_p23(T/K)*Pa
T_Bmin := 623.15*K
T_Bmax := 863.15*K
ΔT_B := (T_Bmax - T_Bmin)/300 = 0.8 K
T_B := T_Bmin, T_Bmin + ΔT_B .. T_Bmax
# Region 1/3 Curve :
T_13[1] := T_Bmin
T_13[2] := T_Bmin
P_13[1] := P_23(T_Bmin) = 16.5292 MPa
P_13[2] := 100*MPa
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## Saturation Function Verification and Continuity Check
# Discrete Pressure Isobars | Define Specific Volume Functions with Units
p1 := 0.05*MPa
p4 := P_c
v_tp(T, P) := if97_vtp(T/K, P/Pa)*m^3/kg
v_f(P) := if97_vf(P/Pa)*m^3/kg
p2 := .5*MPa
p5 := 50*MPa
p3 := 5*MPa
p6 := 100*MPa
v_g(P) := if97_vg(P/Pa)*m^3/kg
# Temperature Range
TT := T_t, T_t + ΔT .. 1073.15*K
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# Define Enthalpy Unit Functions:
h_tp(T, P) := if97_htp(T/K, P/Pa)*J/kg
h_f(P) := if97_hf(P/Pa)*J/kg
h_g(P) := if97_hg(P/Pa)*J/kg
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# Reverse Function Verification
# The Pressure-Enthalpy tables below contain the published T(p,h) values for verification of computer programs from Table 7 (p. 11),  and Table 24 (p. 25) of Reference [b], as well as Table 5 (p. 8) of Reference [c].
# Define the Backward unit function:
T_ph(p, h) := if97_tph(p/Pa, h/(J*kg^-1))*K
# [component: outputs H]
# Extract Table Values:
P_val := H[:, 1]*MPa
h_val := H[:, 2]*kJ/kg
T_val := H[:, 3]*K
# Calculate Values and Error from IF97:
T_calc := vectorize(T_ph(P_val, h_val))
ε_calc := vectorize((T_calc - T_val)/T_val)
# Add columns to table to show below:
H[:, 4] := T_calc*K^-1
H[:, 5] := ε_calc
# [component: inputs H]
# The Pressure-Entropy tables below contain the published T(p,s) values for verification of computer programs from Table 9 (p. 12) and Table 29 (p. 29) of Reference [b], as well as Table 12 (p. 13) of Reference [c].
# Define the Backward unit function:
T_ps(p, s) := if97_tps(p/Pa, s/(J*kg^-1*K^-1))*K
# [component: outputs S]
# Extract Table Values:
P_val := S[:, 1]*MPa
s_val := S[:, 2]*kJ/(kg*K)
T_val := S[:, 3]*K
# Calculate Values and Error from IF97:
T_calc := vectorize(T_ps(P_val, s_val))
ε_calc := vectorize((T_calc - T_val)/T_val)
# Add columns to table to show below:
S[:, 4] := T_calc*K^-1
S[:, 5] := ε_calc
# [component: inputs S]
# The Enthalpy-Entropy tables below contain the published p(h,s) values for verification of computer programs from Table 3 (p. 6) and Table 9 (p. 10) of Reference [d], as well as Table 5 (p. 10) of Reference [e].
# Define the Backward unit function:
P_hs(h, s) := if97_phs(h/(J*kg^-1), s/(J*kg^-1*K^-1))*Pa
# [component: outputs HS]
# Extract Table Values:
h_val := HS[:, 1]*kJ/kg
s_val := HS[:, 2]*kJ/(kg*K)
P_val := HS[:, 3]*MPa
# Calculate Values and Error from IF97:
P_calc := vectorize(P_hs(h_val, s_val))
ε_calc := vectorize((P_calc - P_val)/P_val)
# Add columns to table to show below:
HS[:, 4] := P_calc*MPa^-1
HS[:, 5] := ε_calc
# [component: inputs HS]
# Water Viscosity Property Verification
# Set up Pressure and Temperature matrix based on tabulated values from IAPWS Reference [f], page 8, Table 4.  First define: μPa ≡ 10^-6*Pa
# Define Viscosity Unit Functions: | Saturated Liquid | Saturated Vapor
μ_tp(T, P) := if97_mutp(T/K, P/Pa)*Pa*s
μ_f(p) := if97_muf(p/Pa)*Pa*s
μ_g(p) := if97_mug(p/Pa)*Pa*s
μ_tρ(T, ρ) := if97_mutrho(T/K, ρ/(kg*m^-3))*Pa*s  # Function of T and ρ only set up for verification purposes
## IAPWS Values
## Calculated Values
T_μ := [298.15; 298.15; 373.15; 433.15; 433.15; 873.15; 873.15; 873.15; 1173.15; 1173.15; 1173.15]*K
ρ_μ := [998; 1200; 1000; 1; 1000; 1; 100; 600; 1; 100; 400]*kg/m^3
μ* := [889.7351; 1437.649467; 307.883622; 14.538324; 217.685358; 32.619287; 35.802262; 77.430195; 44.217245; 47.640433; 64.154608]*μPa*s
vectorize(μ_tρ(T_μ, ρ_μ)) = [889.735; 1437.65; 307.884; 14.5383; 217.685; 32.6193; 35.8023; 77.4302; 44.2172; 47.6404; 64.1546] μPa*s
## Relative Error from Published Values
## Root Mean Square
RMS(M) := sqrt(sum(sum(M[i, j]^2, j = 1 .. cols(M)), i = 1 .. rows(M))/(rows(M)*cols(M)))
Err_IAPWS := vectorize((μ* - vectorize(μ_tρ(T_μ, ρ_μ)))/μ*) = [-1.68374e-10; 2.16751e-10; -1.10926e-9; -3.34136e-8; -1.21783e-9; 7.97673e-10; 7.76837e-9; -2.93532e-9; 1.0975e-8; -1.70164e-9; 2.36364e-9]
RMS(Err_IAPWS) = 1.09453e-8
# The next two tables represent the experimental data from Reference [g] (Appendix A) for water viscosity measurements [μPa-s] taken over the full IF97 range of temperatures and pressures.  The data is presented here in two halves, but will be combined and extracted into matrices for comparison with the calculated values.  Note that there is a typographical error in Reference [g] that printed the temperature in column fourteen in the Appendix A table as 500°C, when it should have been 450°C in the temperature series.
# Appendix A-1: Table of Critically-Evaluated Experimental Data
# [component: outputs M1]
# Appendix A-2: Table of Critically-Evaluated Experimental Data
# [component: outputs M2]
M := augment(M1, M2)
P_IAPS := submatrix(M, 2, rows(M), 1, 1)*MPa
i := 1 .. rows(P_IAPS)
T_IAPS := transpose(submatrix(M, 1, 1, 2, cols(M))) °C
j := 1 .. rows(T_IAPS)
μ_IAPS := submatrix(M, 2, rows(M), 2, cols(M))*(μPa*s)
# Calculate IF97 values:
μ_calc[i, j] := μ_tp(T_IAPS[j], P_IAPS[i])
# Calculate IF97 relative error:
err_IAPS := vectorize(|μ_IAPS - μ_calc|/(μ_IAPS*%))
RMS(err_IAPS) = 0.526771  # %
max(err_IAPS) = 2.37742  # %
# Relative IF97 Viscosity Error (%) from IAPS Experimental Data
# [component: inputs transpose(err_IAPS)]
# The RMS error is around 0.5% and the maximum relative error is about 2.4% in the high temperature, moderate pressure vapor region.  This maximum occurs in an area where the measurement uncertainty is between 2.6 and 3.0%.  Relative error everywhere else is predominantly well below the relative measurement uncertainty of 1.4 to 2.6%.
# The plot below ensures confirms that viscosity as a function of temperature and pressure are accurate and continuous, including saturation curve functions.
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# Water Thermal Conductivity Property Verification
# Set up Pressure and Temperature matrix based on tabulated values from IAPWS Reference [h], pages 13-14, Table 7, 8, and 9.
# Define Viscosity Unit Functions: | Saturated Liquid | Saturated Vapor
k_tp(T, P) := if97_ktp(T/K, P/Pa)*W/(m*K)
k_f(p) := if97_kf(p/Pa)*W/(m*K)
k_g(p) := if97_kg(p/Pa)*W/(m*K)
## IAPWS Values
## Calculated Values
# [component: outputs M]
vectorize(k_tp(M[:, 1]*K, M[:, 2]*MPa)) = [0.481485; 0.545039; 0.0522311; 0.17771; 0.366879; 1.24182; 0.606516] W/(m*K)
T_k := M[:, 1]*K
P_k := M[:, 2]*MPa
k_IAPWS := M[:, 4]*W/(m*K)
## Relative Error from Published Values
## Root Mean Square
Err_k := vectorize((k_IAPWS - k_tp(T_k, P_k))/k_IAPWS) = [0; 0; 0; 0; 1.1348e-14; 0; -2.60954e-5]
RMS(Err_k) = 9.86315e-6
# The next two tables represent the experimental data from Reference [i] (Appendix A) for water thermal conductivity measurements [W/mK] taken over the full IF97 range of temperatures and pressures.  The data is presented here in two halves for display purposes, but will be combined and extracted into matrices for comparison with the calculated values.
# Table A.1 Critically Evaluated Experimental Data Reduced to a Uniform Grid
# [component: outputs [T1; P1; K1]]
# Table A.1 Critically Evaluated Experimental Data Reduced to a Uniform Grid
# [component: outputs [T2; P2; K2]]
T_k := stack(transpose(T1), transpose(T2)) °C
j := 1 .. rows(T_k)
P_k := P1*MPa
i := 1 .. rows(P_k)
k_exp := augment(K1, K2)*mW/(m*K)
# Calculate IF97 values:
k_calc[i, j] := k_tp(T_k[j], P_k[i])
# Calculate IF97 relative error:
errk_IAPS := vectorize(|k_exp - k_calc|/(k_exp*%))
RMS(errk_IAPS) = 1.99518  # %
max(errk_IAPS) = 8.51164  # %
# Relative IF97 Thermal Conductivity Deviation (%) from 1985/2008 IAPS Experimental Data
# [component: inputs transpose(errk_IAPS)]
# The fairly consistent deviation from the 2008 data of around 1.217% is consistent with the shift in the 2011 correlations based on the addition of newer experimental data to the database; still within the minimum data uncertainty of 1.5%.  The larger error at high temperature and pressure is relative to values that were extrapolated beyond the validity of the 1985/2008 data.  High pressure data was incorporated into the 2011 formulation.
# The plot below ensures confirms that thermal conductivity as a function of temperature and pressure are accurate and continuous, including saturation curve functions.
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# Water Surface Tension Verification
# Set up matrix based on tabulated values from IAPWS Reference [j], pages 4-5, Table 1.
# First define:
mN ≡ 0.001*N
mN/m ≡ mN/m
# [component: outputs M_σ]
T_σ := M_σ[:, 1] °C
σ_exp := M_σ[:, 2]*mN/m
σ_u := M_σ[:, 3]*mN/m
σ_calc := M_σ[:, 4]*mN/m
# Set up a unit handling function for surface tension, σ(T):
σ(T) := if97_sigma(T/K)*N/m
# Calculate error from the published verification values.
ε_97 := vectorize((Round(σ(T_σ), 0.01*mN/m) - σ_calc)/mN/m)
max(ε_97) = 1.38778e-14
# Calculate the error from the experimental values:
ε_σ := vectorize(σ(T_σ) - σ_exp)
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# The calculated values match the published values exactly to the published precision.  The difference between the calculated values and the experimental measurements from IAPS data is within the measurement uncertainty of the data.
# Water Prandtl Number Verification
# Plot Prandtl Number vs. Temperature for continuity and reasonableness check.
# Define Prandtl Unit Functions: | Saturated Liquid | Saturated Vapor
Pr_tp(T, P) := if97_prtp(T/K, P/Pa)
Pr_f(p) := if97_prf(p/Pa)
Pr_g(p) := if97_prg(p/Pa)
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# References
#
# [a]  IAPWS, Revised Release on the IAPWS Industrial Formulation 1997 for the Thermodynamic Properties of Water and Steam, Lucerne, Switzerland, August 2007. [IAPWS R7-97(2012)]
# [b]  IAPWS, Revised Supplementary Release on Backward Equations for Specific Volume as a Function of Pressure and Temperature v(p,T) for Region 3 of the IAPWS Industrial Formulation 1997 for the Thermodynamic Properties of Water and Steam, Moscow, Russia, 2014. [IAPWS SR5-05(2016)]
# [c]  IAPWS, Revised Supplementary Release on Backward Equations for the Functions T(p,h), v(p,h) and T(p,s), v(p,s) for Region 3 of the IAPWS Industrial Formulation 1997 for the Thermodynamic Properties of Water and Steam, Moscow, Russia, June 2014.
# [IAPWS SR3-03]
# [d]  IAPWS, Revised Supplementary Release on Backward Equations for Pressure as a Function of Enthalpy and Entropy p(h,s) for Regions 1 and 2 of the IAPWS Industrial Formulation 1997 for the Thermodynamic Properties of Water and Steam, Moscow, Russia, June 2014. [IAPWS SR2-01(2014)]
# [e]  IAPWS, Revised Supplementary Release on Backward Equations p(h,s) for Region 3, Equations as a Function of h and s for the Region Boundaries, and an Equation Tsat(h,s) for Region 4 of the IAPWS Industrial Formulation 1997 for the Thermodynamic Properties of Water and Steam, Moscow, Russia, June 2014. [IAPWS SR4-04(2014)]
# [f]  IAPWS, Release on the IAPWS Formulation 2008 for the Viscosity of Ordinary Water Substance, Berlin, Germany, September 2008. [IAPWS R12-08].
# [g]  IAPWS, Revised Release on the IAPS Formulation 1985 for the Viscosity of Ordinary Water Substance, Vejle, Denmark, August 2003.
# [h]  IAPWS, Release on the IAPWS Formulation 2011 for the Thermal Conductivity of Ordinary Water Substance, Plzeň, Czech Republic, September 2011. [IAPWS R15-11]
# [i]  IAPWS, Revised Release on the IAPS Formulation 1985 for the Thermal Conductivity of Ordinary Water Substance, London, England, August 1998.
# [j]  IAPWS, Revised Release on Surface Tension of Ordinary Water Substance, Moscow, Russia, June 2014.  [IAPWS R1-76(2014)]
